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/batch
! ANSYS input file written by Workbench version 2025 R2
! File used for geometry attach: C:\Users\andre\Desktop\PBLE00\Projeto-Ansys\Projeto_files\dp0\SYS-3\DM\SYS-3.scdocx
/title,Projeto--Static Structural (C5)
/COM,/COM,     ANSYSMotion, 2025.2
/com,--- Data in consistent NMM units. See Solving Units in the help system for more information.
/units,MPA
/prep7
! Turn off shape checking because checks already performed inside WB mesher.
! See help system for more information.
SHPP,OFF,,NOWARN
etcon,set             ! allow ANSYS to choose best KEYOP's for 180x elements, resets any applicable keyopt to MAPDL defaults
/com,*********** Send User Defined Coordinate System(s) ***********
csys,0
/com,*********** Nodes for the whole assembly ***********
nblock,3,,21370
(1i9,3e20.9e3)
    82484     1.442046218E+02    -1.055542372E+02     1.389500000E+01
    82485     1.470749102E+02    -1.055031402E+02     1.389500000E+01
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-1
/com,*********** Elements for Body 1 'SYS-3\Solid1' ***********
et,1,187
MAT,1 $ TYPE,1 $ REAL,1 $ SECNUM,1 $ ESYS,0
eblock,11,COMPACT,,6868
(11i9)
    16220    66051    68420    66996    66932    70500    75867    70498    70496    75624    75621
    16221    66051    68420    66052    66996    70500    70507    70493    70498    75867    70505
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-1
secnum,1    ! reset the section ID to default
/com,*********** Elements for Body 2 'SYS-3\Solid' ***********
et,2,186
keyo,2,2,1          ! set full integration on SOLID186
MAT,2 $ TYPE,2 $ REAL,2 $ SECNUM,2 $ ESYS,0
eblock,11,COMPACT,,234
(11i9)
    24276    82487    82674    82675    82508    82864    82677    82676    82843    83048    83643
    83138    83046    83653    83648    83649    84043    83049    83644    83646    83139
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-1
secnum,1    ! reset the section ID to default
/com,*********** Elements for Body 3 'SYS-3\Solid11' ***********
et,3,187
MAT,3 $ TYPE,3 $ REAL,3 $ SECNUM,3 $ ESYS,0
eblock,11,COMPACT,,1172
(11i9)
    24510    84327    84331    84576    84787    84859    84872    84860    84862    84875    86160
    24511    84319    84787    84331    84327    84825    84875    84821    84819    84862    84859
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-1
secnum,1    ! reset the section ID to default
toffst,273.15,      ! Temperature offset from absolute zero
/com,*********** Set Reference Temperature ***********
tref,22.
/com,*********** Send Materials ***********
Temperature = 'TEMP' ! Temperature
MP,DENS,1,9.034e-10,	! tonne mm^-3
MP,EX,1,1461,	! tonne s^-2 mm^-1
MP,NUXY,1,0.4087,
MP,ALPX,1,9.909e-05,	! C^-1
MP,KXX,1,0.209,	! tonne mm s^-3 C^-1
MP,C,1,1600000000,	! mm^2 s^-2 C^-1
MP,RSVX,1,1e+19,	! ohm mm
MP,LSST,1,0.0002,
MP,PERX,1,2.2,

Temperature = 'TEMP' ! Temperature
MP,DENS,2,7.85e-09,	! tonne mm^-3
MP,ALPX,2,1.2e-05,	! C^-1
MP,C,2,434000000,	! mm^2 s^-2 C^-1
MP,KXX,2,60.5,	! tonne mm s^-3 C^-1
MP,RSVX,2,0.00017,	! ohm mm
MP,EX,2,200000,	! tonne s^-2 mm^-1
MP,NUXY,2,0.3,
MP,MURX,2,10000,

Temperature = 'TEMP' ! Temperature
MP,DENS,3,9.034e-10,	! tonne mm^-3
MP,EX,3,1461,	! tonne s^-2 mm^-1
MP,NUXY,3,0.4087,
MP,ALPX,3,9.909e-05,	! C^-1
MP,KXX,3,0.209,	! tonne mm s^-3 C^-1
MP,C,3,1600000000,	! mm^2 s^-2 C^-1
MP,RSVX,3,1e+19,	! ohm mm
MP,LSST,3,0.0002,
MP,PERX,3,2.2,

!************************* Model Summary ********************
!SYS-3\Solid1,	Plastic, PP (homopolymer, low flow),	matid,	1
!SYS-3\Solid,	Structural Steel,	matid,	2
!SYS-3\Solid11,	Plastic, PP (homopolymer, low flow),	matid,	3
!************************* End Model Summary ********************
/com,*********** Create Contact "Contact Region" ***********
*set,tid,5
*set,cid,4
r,tid
r,cid
et,tid,170
et,cid,174
MAT,5 $ TYPE,5 $ REAL,5 $ SECNUM,5 $ ESYS,0
eblock,11,COMPACT,,145
(11i9)
    52646    67509    67538    67510    67510    77831    77834    67510    77829
    52647    67509    67537    67538    67538    77830    77976    67538    77831
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-1
secnum,1    ! reset the section ID to default
MAT,4 $ TYPE,4 $ REAL,4 $ SECNUM,4 $ ESYS,0
eblock,11,COMPACT,,145
(11i9)
    52791    67509    67538    67510    67510    77831    77834    67510    77829
    52792    67509    67537    67538    67538    77830    77976    67538    77831
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-1
secnum,1    ! reset the section ID to default
MAT,4 $ TYPE,4 $ REAL,5 $ SECNUM,4 $ ESYS,0
eblock,11,COMPACT,,56
(11i9)
    52936    82962    82961    82946    82947    84250    84234    84233    84235
    52937    82961    82960    82945    82946    84249    84232    84231    84234
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-1
secnum,1    ! reset the section ID to default
MAT,5 $ TYPE,5 $ REAL,4 $ SECNUM,5 $ ESYS,0
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keyo,cid,8,2               ! auto create asymmetric contact (from Program Controlled setting)
keyo,cid,10,0              ! adjust contact stiffness each NR iteration (from Program Controlled setting)
keyo,cid,12,5              ! bonded always
keyo,cid,18,1              ! small sliding turned on by application
keyo,cid,2,2               ! MPC for bonded contacts (from Program Controlled setting)
keyo,tid,5,0               ! Automatic constraint type detection
keyo,cid,4,2               ! on nodal point - normal to target surface (from Program Controlled setting)
keyo,cid,9,1               ! ignore initial gaps/penetration
keyo,cid,7,0               ! No Prediction
rmod,tid,3,10.      ! FKN
rmod,tid,5,0.       ! ICONT
rmod,tid,6,0.       ! PINB
rmod,tid,10,0.      ! CNOF
rmod,tid,12,0.      ! FKT
rmod,tid,36,1487    ! WB DSID
rmod,cid,3,10.      ! FKN
rmod,cid,5,0.       ! ICONT
rmod,cid,6,0.       ! PINB
rmod,cid,10,0.      ! CNOF
rmod,cid,12,0.      ! FKT
rmod,cid,36,1487    ! WB DSID
/com,*********** Create Contact "Contact Region 2" ***********
*set,tid,7
*set,cid,6
r,tid
r,cid
et,tid,170
et,cid,174
MAT,7 $ TYPE,7 $ REAL,7 $ SECNUM,7 $ ESYS,0
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MAT,6 $ TYPE,6 $ REAL,6 $ SECNUM,6 $ ESYS,0
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MAT,6 $ TYPE,6 $ REAL,7 $ SECNUM,6 $ ESYS,0
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MAT,7 $ TYPE,7 $ REAL,6 $ SECNUM,7 $ ESYS,0
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keyo,cid,8,2               ! auto create asymmetric contact (from Program Controlled setting)
keyo,cid,10,0              ! adjust contact stiffness each NR iteration (from Program Controlled setting)
keyo,cid,12,5              ! bonded always
keyo,cid,18,1              ! small sliding turned on by application
keyo,cid,2,2               ! MPC for bonded contacts (from Program Controlled setting)
keyo,tid,5,0               ! Automatic constraint type detection
keyo,cid,4,2               ! on nodal point - normal to target surface (from Program Controlled setting)
keyo,cid,9,1               ! ignore initial gaps/penetration
keyo,cid,7,0               ! No Prediction
rmod,tid,3,10.      ! FKN
rmod,tid,5,0.       ! ICONT
rmod,tid,6,0.       ! PINB
rmod,tid,10,0.      ! CNOF
rmod,tid,12,0.      ! FKT
rmod,tid,36,1498    ! WB DSID
rmod,cid,3,10.      ! FKN
rmod,cid,5,0.       ! ICONT
rmod,cid,6,0.       ! PINB
rmod,cid,10,0.      ! CNOF
rmod,cid,12,0.      ! FKT
rmod,cid,36,1498    ! WB DSID
/com,*********** Create Contact "Contact Region 3" ***********
*set,tid,9
*set,cid,8
r,tid
r,cid
et,tid,170
et,cid,174
MAT,9 $ TYPE,9 $ REAL,9 $ SECNUM,9 $ ESYS,0
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MAT,8 $ TYPE,8 $ REAL,8 $ SECNUM,8 $ ESYS,0
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MAT,8 $ TYPE,8 $ REAL,9 $ SECNUM,8 $ ESYS,0
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MAT,9 $ TYPE,9 $ REAL,8 $ SECNUM,9 $ ESYS,0
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keyo,cid,8,2               ! auto create asymmetric contact (from Program Controlled setting)
keyo,cid,10,0              ! adjust contact stiffness each NR iteration (from Program Controlled setting)
keyo,cid,12,5              ! bonded always
keyo,cid,18,1              ! small sliding turned on by application
keyo,cid,2,2               ! MPC for bonded contacts (from Program Controlled setting)
keyo,tid,5,0               ! Automatic constraint type detection
keyo,cid,4,2               ! on nodal point - normal to target surface (from Program Controlled setting)
keyo,cid,9,1               ! ignore initial gaps/penetration
keyo,cid,7,0               ! No Prediction
rmod,tid,3,10.      ! FKN
rmod,tid,5,0.       ! ICONT
rmod,tid,6,0.       ! PINB
rmod,tid,10,0.      ! CNOF
rmod,tid,12,0.      ! FKT
rmod,tid,36,1501    ! WB DSID
rmod,cid,3,10.      ! FKN
rmod,cid,5,0.       ! ICONT
rmod,cid,6,0.       ! PINB
rmod,cid,10,0.      ! CNOF
rmod,cid,12,0.      ! FKT
rmod,cid,36,1501    ! WB DSID
nsel,all
esel,all
/com,*********** Fixed Supports ***********
CMBLOCK,_FIXEDSU,NODE,      145
(8i10)
     67614     67616    -67628     67630    -67643     67647    -67660     67663
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cmsel,s,_FIXEDSU
d,all,all
nsel,all
/com,*********** Define Force Using Surface Effect Elements ***********
local,12,0,0.,0.,0.,0.,0.,0.
csys,0
et,10,154
MAT,10 $ TYPE,10 $ REAL,10 $ SECNUM,10 $ ESYS,12
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esel,s,type,,10
keyop,10,2,1        ! Apply load in local coordinate system
keyop,10,7,1        ! Use original area so load is constant in large deformation
esel,all
fini
/com,****************************************************************************
/com,*************************    SOLUTION       ********************************
/com,****************************************************************************
/solu
antype,0                   ! static analysis
_thickRatio=  0     ! Ratio of thick parts in the model
eqsl,sparse,,,,,1
cntr,print,1               ! print out contact info and also make no initial contact an error
cncheck,dmp		!	Enable program controlled contact splitting for distributed memory parallel run
dmpoption,emat,no             ! Don't combine emat file for DANSYS
dmpoption,esav,no             ! Don't combine esav file for DANSYS
nldiag,cont,iter           ! print out contact info each equilibrium iteration
rescontrol,,none                 ! Do not keep any restart files
/com,****************************************************
/com,******************* SOLVE FOR LS 1 OF 1 ****************
esel,s,type,,10
nsle
sfe,all,1,pres,1,2.41196282298675e-032
sfe,all,2,pres,1,1.96951725377974e-016
sfe,all,3,pres,1,-0.2984116935038
nsel,all
esel,all
nsub,1,1,1
time,1.
outres,erase
outres,all,none
outres,nsol,all,
outres,rsol,all
outres,eangl,all
outres,etmp,all
outres,veng,all
outres,strs,all,
outres,epel,all,
outres,eppl,all,
outres,cont,all,
! *********** WB SOLVE COMMAND ***********
! check interactive state
*get,ANSINTER_,active,,int
*if,ANSINTER_,ne,0,then
/eof
*endif
solve
/com *************** Write FE CONNECTORS *********
CEWRITE,file,ce,,INTE
/com,****************************************************
/com,*************** FINISHED SOLVE FOR LS 1 *************
*get,_NSOLTHREADS,active,0,ntfs
*get,_NSOLPROCESSES,active,0,npfs
/post1
fini
